# LAMMPS input script for colloid diffusion
# calculates time correlation functions and memory function

##############################
# set input values
##############################

# box
variable	box_size equal 20

# system paramter
variable        T equal 1.5
variable	rho_solvent equal 0.4
variable	rho_salt equal 0.1

# colloid
variable	R equal 5
variable	M equal 100
variable	N_c equal 10
variable	Q equal 100

# interactions
variable	rc equal 1.12246

# tuneable parameters
variable	rc_coul equal 4.0
variable	skin equal 1.5


##############################
# calculate system variables
##############################

# reduced densities
variable	red_rho_solvent equal ${rho_solvent}-2*${rho_salt}
variable	red_box_size equal (${box_size}^(3.0)-4.0/3.0*PI*${R}^(3.0))^(1.0/3.0)

# counterions
variable	N_counter equal ${N_c}*${Q}

# interactions
variable	offset_sc equal $R-1
variable	cut_sc equal ${offset_sc}+${rc}
variable	offset_cc equal 2*$R-1
variable	cut_cc equal ${offset_cc}+${rc}


##############################
# system setup
##############################

# lj 3d solvent
units		lj
dimension	3
atom_style	charge

# create lattice (to place particles), simulation box
lattice         sc ${red_rho_solvent}
region          simbox block 0 ${box_size} 0 ${box_size} 0 ${box_size}
boundary 	p p p
create_box      4 simbox

# create particles
# solvent
create_atoms    1 box
group		solvent type 1

# positivly charged ions
lattice         sc ${rho_salt} origin 0.01 0.01 0.01
create_atoms    2 box
group		counterions type 2

# negativly charged ions
lattice         sc ${rho_salt} origin 0.02 0.02 0.02
create_atoms    3 box
# add counterions to get neutral system
create_atoms	3 random ${N_counter} 591654 simbox
group		coions type 3

# colloids
create_atoms    4 random ${N_c} 7435087 simbox
group		colloid type 4

# initialize particles
set		type 1 charge 0.0
set		type 2 charge 1
set		type 3 charge -1
set		type 4 charge ${Q}
mass            *3 1.0
mass            4 ${M}

# define nighbourlist
neighbor	${skin} multi
neigh_modify	delay 0
comm_modify     mode multi


##############################
# relaxation
##############################

# loop to relax the solvent-colloid interaction
variable	offset loop 0 10

# increase offset stepwise to relax the system
label		relax_sc_loop
pair_style      lj/off ${rc}
pair_modify 	shift yes
pair_coeff      *3 *3 1 1 0
pair_coeff      *3 4 1 1 ${offset} ${cut_sc}
pair_coeff	4 4 1 1 0 ${cut_cc}

# minimze energy for integration
thermo          1000
min_style 	fire
minimize 	1.0e-5 1.0e-5 10000 10000
reset_timestep  0
next		offset
if		"${offset} > ${offset_sc}" then "jump SELF sc_break"
jump		SELF relax_sc_loop
label		sc_break
pair_coeff      *3 4 1 1 ${offset_sc} ${cut_sc}

# loop to relax the colloid-colloid interaction
variable	offset loop 0 10

# increase offset stepwise to relax the system
label		relax_cc_loop
pair_style      lj/off ${rc}
pair_modify 	shift yes
pair_coeff      *3 *3 1 1 0
pair_coeff      *3 4 1 1 ${offset_sc} ${cut_sc}
pair_coeff	4 4 1 1 ${offset} ${cut_cc}

# minimze energy for integration
thermo          1000
min_style 	fire
minimize 	1.0e-5 1.0e-5 10000 10000
reset_timestep  0
next		offset
if		"${offset} > ${offset_cc}" then "jump SELF cc_break"
jump		SELF relax_cc_loop
label		cc_break
pair_coeff	4 4 1 1 ${offset_cc} ${cut_cc}

# create final interactions
# lj
pair_style      hybrid/overlay lj/off ${rc} coul/long ${rc_coul}
pair_modify 	shift yes
pair_coeff      *3 *3 lj/off 1 1 0
variable	offset_sc equal $R-1
variable	cut_sc equal ${offset_sc}+${offset_sc}
variable	cut_sc_coul equal ${rc_coul}+${rc}
pair_coeff      *3 4 lj/off 1 1 ${offset_sc} ${cut_sc}
variable	offset_cc equal 2*$R-1
variable	cut_cc equal ${offset_cc}+${rc}
variable	cut_cc_coul equal ${rc_coul}+${offset_sc}
pair_coeff	4 4 lj/off 1 1 ${offset_cc} ${cut_cc}
# coulomb
pair_coeff      * * coul/long
kspace_style 	pppm 1.0e-4


##############################
# equilibration output
##############################
#dump 		3 all custom 1 dump.myforce type x y z
#dump		2 all image 1000 image.*.jpg type type &
#		zoom 1.5 center d 0.5 0.5 0.5
#dump_modify	2 pad 5 adiam solvent 1.6 adiam colloid 8.0


##############################
# equilibration run
##############################

# assign random velcities velocities
velocity        all create $T 97287

# define integration
fix             1 all nve
fix	        2 all langevin $T $T 0.1 498094

thermo          100
run	        1000

unfix		2
reset_timestep  0


##############################
# define on-the-fly calculations
##############################

variable vx atom vx
variable vy atom vy
variable vz atom vz
variable fx atom fx
variable fy atom fy
variable fz atom fz
fix 4 colloid ave/correlate/peratom 1 1000 2000 v_vx v_vy v_vz v_fx v_fy v_fz file correlate_charged ave running overwrite


##############################
# production run
##############################

thermo          100
run	        1000
